# Los métodos de Diferencias Finitas (DF) se basan en aproximar las derivadas de una función utilizando los valores de la función en puntos discretos, o nodos. Los tipos de aproximación de la derivada de primer y segundo orden (hacia adelante, hacia atrás y centrales) se derivan del desarrollo en Serie de Taylor.
# Aproximación de Derivada de Primer Orden: u'(x) se puede aproximar utilizando el valor de la función u(x) y los valores en nodos adyacentes, separados por una distancia h = Δx
# - Hacia Adelante (Forward Difference): Esta aproximación utiliza el valor del nodo actual (Xi) y el valor del nodo inmediatamente posterior (Xi+1).
# formula
du/dx == u'(x_i) == (u(x_i + 1) - u(x_i))/h
# - Hacia Atras( Backward Difference) Esta aproximacion utiliza el valor de l nodo actual (Xi) y el valor del nodo inmediatamente anterior (Xi-1).
# Formula:
du/dx == u'(x_i) == (u(x_i) - u(x_i - 1))/h
# - Central (Centered Difference): Esta aproximación utiliza los valores de los nodos adyacentes al punto de interés: el posterior (Xi+1) y el anterior (Xi-1), omitiendo el valor en Xi en el numerador.
# Formula:
du/dx == u'(x_i) == (u(x_i + 1) - u(x_i - 1))/(2*h)
# Aproximación de la derivada de segundo orden: u''(x) se puede aproximar también de forma hacia adelante, hacia atras y central.
# - Hacia adelante (Forward Difference): utiliza el nodo actual y los dos nodos posteriores (Xi+1 y Xi+2)
# Formula:
d^2*u/(d^2*x) == u''(x_i) == (u(x_i + 2) - 2*u(x_i + 1) + u(x_i))/h^2
# - Hacia atras (Backward Difference): Utiliza el nodo actual y los dos nodos anteriores (Xi-1 y Xi-2)
# Formula:
d^2*u/(d^2*x) == u''(x_i) == (u(x_i) - 2*u(x_i - 1) + u(x_i - 2))/h^2
# - Central (Centered Difference): Esta es la aproximacion mas comun para la segunda derivada. utiliza los nodos adyacentes: anterior (Xi-1) y posterior (Xi+1), junto al nodo actual (Xi)
# formula:
d^2*u/(d^2*x) == u''(x_i) == (u(x_i + 1) - 2*u(x_i) + u(x_i - 1))/h^2
# Elementos finitos
# El elemento de la figura es un Elemento Triangular Lineal o Triángulo de Esfuerzo Constante (CST) con nodos en los vértices a, b, c. Al ser un triángulo rectángulo, su matriz de rigidez (K^e) tiene una forma ligeramente simplificada en comparación con un triángulo general, pero se deriva de la misma formulación general.Para el problema de la Ecuación de Poisson/Laplace (Delta u = f), la contribución del elemento a la matriz de rigidez global (A) se obtiene a partir de la integral de las derivadas del producto de las Funciones de Forma (N_i):
# Donde N es el vector de las funciones de forma N = [N_a, N_b, N_c]^T.
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# Matriz de Rigidez (K^e) para un Elemento Triangular Lineal La matriz de rigidez del elemento K^e es una matriz de 3x3 (un grado de libertad por nodo, a, b, c). Sus componentes se expresan en función del área del elemento (A_e) y de las constantes que definen las funciones de forma (que a su vez dependen de las coordenadas de los nodos a, b, c).Para un elemento triangular lineal, las derivadas de las funciones de forma dNi/dx y dNi/dy son constantes dentro del elemento.La matriz K^e se calcula como:
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# Donde los coeficientes se calculan a partir de las coordenadas nodales (xi, yi):
# - ba = yb - yc
# - bb = yc - ya
# - bc = ya - yb
# - ca = xc - xb
# - cb = xa - xc
# - cc = xb - xa
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# Area del elemento
# Para el triángulo rectángulo específico (con el ángulo recto en b):Si el triángulo está alineado con los ejes (como en la figura), por ejemplo, b=(xb, yb), a=(xb, ya), c=(xc, yb), muchos de los coeficientes bi o ci se simplifican a 0, y la matriz K^e resultante será más sencilla.
# El cálculo anterior ya representa la generalización para un elemento triangular lineal con cualquier tamaño, orientación, y ubicación de los nodos.
# Esta generalización son las Coordenadas de Área (o Coordenadas Baricéntricas) y la Formulación Isoparamétrica
# 1. Coordenadas de Área / Funciones de Forma (Ni)En la formulación de Elementos Finitos para el problema de Poisson/Laplace, la variable u(x, y) se interpola dentro de un elemento e usando las funciones de forma (Ni) y los valores nodales (ui):
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# Para los elementos triangulares lineales, las funciones de forma Ni son polinómicas de primer orden y se relacionan directamente con las coordenadas de área (λi):
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# donde P es un punto genérico (x, y) dentro del triángulo.
# 2. Formulación Isoparamétrica (para elementos de orden superior)Para elementos más complejos o cuando se utiliza una transformación a un elemento de referencia (un triángulo unitario canónico), se utiliza la Formulación Isoparamétrica.
# Este método utiliza un Jacobiano (J) para mapear la integral de la matriz de rigidez de las coordenadas cartesianas (x, y) a las coordenadas naturales (ξ, η) del elemento de referencia.
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# La Forma Débil es una reformulación de una Ecuación Diferencial Parcial (EDP) que se obtiene multiplicando la EDP por una función de ponderación o función de prueba (v) y luego integrando sobre todo el dominio (Ω)
# Conceptos Clave: Reducción de la Continuidad (Diferenciabilidad):
# La solución original o "fuerte" (u) de la ecuación de Poisson (como Δu = f) debe ser dos veces diferenciable (u E C^2(Ω)) para que sus derivadas de segundo orden existan puntualmente.
# Al aplicar la integración por partes (o el Teorema de la Divergencia), se traslada una de las derivadas de la solución u a la función de prueba v. Esto reduce la exigencia de diferenciabilidad sobre u. La solución u ahora solo necesita ser una vez diferenciable (u E H^1(Ω) ), lo que es más fácil de satisfacer por funciones de aproximación polinómicas (como las usadas en MEF).
# Método de Galerkin / Residuos Ponderados: La idea central es que el error o residuo (R = Δu- f) debe ser ortogonal a un espacio de funciones de prueba. Es decir, el residuo promedio ponderado debe ser cero en todo el dominio:
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# para toda funcion de prueba v
# bases del MEF: Esta formulación transforma el problema de EDP en un problema de minimización o variación, que, al ser discretizado, se reduce a un sistema de ecuaciones algebraicas lineales (A * u = b).
# El problema original que se busca resolver es la Ecuación de Poisson en 2D:
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# Paso 1: Planteamiento de Residuos Ponderados Se reescribe la ecuación diferencial de forma que el residuo sea cero y se multiplica por la función de prueba v:
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# Paso 2: Aplicación del Teorema de la Divergencia (Integración por Partes)
# Aplicamos la identidad de integración por partes en 2D (que es una aplicación del Teorema de Green o Teorema de la Divergencia):
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# Sustituyendo esto en la ecuación del Paso 1, y reordenando, obtenemos la Forma Débil:
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