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# Trabajo Practico Final: Análisis Numérico y Cálculo Avanzado
#
# Profesor: Prof. Dr. Omar Faure
# Ing. Bruno Bignotti
#
# Alumno: Gabriel, Murguía
# Malcolm, Broxup Toledo
#
# Carrera: Ingeniería Eléctrica
#
# Año 2025
# Índice
# Planteo Analítico .......................................................................................... 3
# Diferencias Finitas ........................................................................................ 5
# Elementos Finitos ........................................................................................ 13
# Bibliografía ................................................................................................. 27
# Aclaración: Todos los códigos usados en este proyecto están registrados y guardados para su revisión en GitHub.
# https://github.com/GabooArevlo/tp-calculo-numerico
# ignorar el archivo con nombre "1-10puntos.py" error de la pagina.
# Planteo Analítico
# Se pedía verificar si la función Ua satisface las condiciones de borde, para ello elegimos las siguientes coordenadas (x,y). (0, 0.5), (1, 0.5), (0.5, 0), (0.5, 1)
# Primero veamos que son las condiciones de borde, son restricciones impuesta a la solución en los limites del dominio de estudio, esto es importante para que el problema tenga una solución única.
# Estas restricciones que mencionamos son las condición de Dirichlet y condición de Neumann. la primer condición especifica el valor de la función en el dominio en este caso tendría que ser cero, la segunda condición se mira la derivada direccional en la dirección del vector normal esto representa como se mueve la función a la frontera.
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# El valor de Ua es:
# Ahora vamos a verificar si cumplen las condiciones:
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# Por lo cual verifica la condición de Dirichlet, gracias a la función Ud.
# Ahora vamos a verificar la siguiente condición:
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# Por lo cual cumple la condición de Neumann.
# Como Ua satisface las condiciones de borde, Ua es una posible solución del problema así que vamos a hallar f_a(x,y) que hace que Ua sea una solución.
# Para ello vamos a aplicar el Laplaciano a Ua.
ΔU_a == f_a(x, y)  # Δ Es el laplaciano
# Por lo cual nos da la siguiente función que hace que eso se cumpla:
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# Representación grafica de la función dada:
# Como podemos observar la función satisface la solución.
# Diferencias Finitas (DF)
# Los 49 puntos igualmente espaciados que cubren todo el dominio, el punto central queda fuera del dominio por lo cual son 48 puntos efectivos.
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# Grafico de los puntos espaciados uniformemente.
# Ahora vamos a ver que sucede cuando los nodos caen afuera del dominio para plantear la matriz A.
# En estos casos lo que se hace es analizar, los que estan completamente fuera del dominio no forman parte del sistema lineal, entonces estos nodos se excluyen de la matriz A en este caso como el único nodo que cae fuera del dominio es el central que esta en el agujero se lo ignora.
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# Clasificacion de los nodos:
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# Podemos observar en la siguiente tabla datos muy importantes sobre cada uno de los nodos:
# sus coordenadas, numero de nodo, tipo de nodo.
# Los métodos de Diferencias Finitas (DF) se basan en aproximar las derivadas de una función utilizando los valores de la función en puntos discretos, o nodos. Los tipos de aproximación de la derivada de primer y segundo orden (hacia adelante, hacia atrás y centrales) se derivan del desarrollo en Serie de Taylor.
# Aproximación de Derivada de Primer Orden: u'(x) se puede aproximar utilizando el valor de la función u(x) y los valores en nodos adyacentes, separados por una distancia h = Δx
# - Hacia Adelante (Forward Difference): Esta aproximación utiliza el valor del nodo actual (Xi) y el valor del nodo inmediatamente posterior (Xi+1).
# formula
du/dx == u'(x_i) == (u(x_i + 1) - u(x_i))/h
# - Hacia Atras( Backward Difference) Esta aproximacion utiliza el valor de l nodo actual (Xi) y el valor del nodo inmediatamente anterior (Xi-1).
# Formula:
du/dx == u'(x_i) == (u(x_i) - u(x_i - 1))/h
# - Central (Centered Difference): Esta aproximación utiliza los valores de los nodos adyacentes al punto de interés: el posterior (Xi+1) y el anterior (Xi-1), omitiendo el valor en Xi en el numerador.
# Formula:
du/dx == u'(x_i) == (u(x_i + 1) - u(x_i - 1))/(2*h)
# Aproximación de la derivada de segundo orden: u''(x) se puede aproximar también de forma hacia adelante, hacia atras y central.
# - Hacia adelante (Forward Difference): utiliza el nodo actual y los dos nodos posteriores (Xi+1 y Xi+2)
# Formula:
d^2*u/(d^2*x) == u''(x_i) == (u(x_i + 2) - 2*u(x_i + 1) + u(x_i))/h^2
# - Hacia atras (Backward Difference): Utiliza el nodo actual y los dos nodos anteriores (Xi-1 y Xi-2)
# Formula:
d^2*u/(d^2*x) == u''(x_i) == (u(x_i) - 2*u(x_i - 1) + u(x_i - 2))/h^2
# - Central (Centered Difference): Esta es la aproximacion mas comun para la segunda derivada. utiliza los nodos adyacentes: anterior (Xi-1) y posterior (Xi+1), junto al nodo actual (Xi)
# formula:
d^2*u/(d^2*x) == u''(x_i) == (u(x_i + 1) - 2*u(x_i) + u(x_i - 1))/h^2
# Cuando los nodos Dirichlet y Neumann son modificados de su fila en el sistema sucede una principal consecuencia que es la reducción del sistema, se reducen el numero de incógnitas, ya que los nodos de Dirichlet su valor es conocido (0) estos mismos se excluyen del vector incógnitas mientras que para los vecinos de la frontera se tiene en cuenta la condición de Dirichlet y esto causa que pierda un vecino en la matriz, mientras que la condición de Neumann tambien excluye del vector u a los nodos fuera del dominio y lo que sucede con las filas adyacentes es que como la fronte es curva lo que sucede es la no alineacion de la direcciones de la malla con la direccion del vector normal n, para eso utilizamos la aproximación simplicada que es la mas sencilla de implementar, consiste en asumir que la derivada normal nula se traduce en que el valor del nodo interior u_P es aproximadamente igual al valor del nodo adyacente u_fuera que está en el hueco u_fuera es casi u_P.
# El efecto en la matriz A: Al sustituir u_fuera por u_P en la ecuación de diferencias finitas del nodo P, el coeficiente asociado a u_P en la diagonal de A se incrementa en 1.
# Resolvemos el sistema
A*u == b
# con
f_a(x, y)
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# Calculamos el error absoluto de cada uno de los 49 nodos y también el error promedio y máximo.
# MÉTRICAS DE ERROR (Malla 7x7)
# Error Absoluto Máximo (E_MAX): 5.998439e-04
# Error Absoluto Promedio: 2.722619e-04
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# Como se puede observar el agujero del medio, tiene forma de cuadrado esto se debe a que los nodos son muy pocos.
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# Solucion para 2601 nodos:
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# Solucion para Ua:
# Error absoluto:
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# Para resumir todos los gráficos que se pueden generar en el código modificando la malla, hicimos una tabla para utilizar luego en el punto 10
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# Tabla pedida en el punto 9:
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# Graficos 2D del error absoluto maximo en comparacion de la cantidad de nodos
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# Grafico 2D del Error Promedio en comparación a la cantidad de nodos:
# Elementos Finitos (EF)
# Elegimos una cantidad de 28 nodos, cubriendo todos las fronteras y suficientes nodos internos.
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# Conteo de Nodos:
# Dirichlet: 16
# Internos: 7
# Neumann: 4
# Externo: 1
# Total nodos: 28 (27 efectivos)
# Tabla luego de armar el mallado de elementos finitos:
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# con un total de 36 elementos generados.
# Grafico con mallado de 27 nodos efectivos
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# El elemento de la figura es un Elemento Triangular Lineal con nodos en los vértices a, b, c, al ser un triángulo rectángulo, su matriz de rigidez (K^e) es mas simple que la de un triangulo general, esto se deriva de la forma general. Para el problema de la Ecuación de Poisson/Laplace (Δu = f), la contribución del elemento a la matriz de rigidez global (A) se obtiene a partir de la integral de las derivadas del producto de las Funciones de Forma (N_i):
# Donde N es el vector de las funciones de forma N = [N_a, N_b, N_c]^T.
K^e == integral(integral(dN/dx*dN^T/dx + dN/dy*dN^T/dy, A))
# Matriz de Rigidez (K^e) para un Elemento Triangular Lineal La matriz de rigidez del elemento K^e es una matriz de 3x3 (un grado de libertad por nodo, a, b, c). Sus componentes se expresan en función del área del elemento (A_e) y de las constantes que definen las funciones de forma (que a su vez dependen de las coordenadas de los nodos a, b, c).Para un elemento triangular lineal, las derivadas de las funciones de forma dNi/dx y dNi/dy son constantes dentro del elemento. La matriz K^e se calcula como:
K^e == 1/(4*A_e)*[
    (b_a^2 + c_a^2), (b_a*b_b + c_a*c_b), (b_a*b_c + c_a*c_c);
    (b_b*b_a + c_b*c_a), (b_b^2 + c_b^2), (b_b*b_c + c_b*c_c);
    (b_c*b_a + c_c*c_a), (b_c*b_b + c_c*c_b), (b_c^2 + c_c^2)
]
# Donde los coeficientes se calculan a partir de las coordenadas nodales (xi, yi):
# - ba = yb - yc
# - bb = yc - ya
# - bc = ya - yb
# - ca = xc - xb
# - cb = xa - xc
# - cc = xb - xa
# Área del elemento
A_e == 1/2*det*[1, x_a, y_a; 1, x_b, y_b; 1, x_c, y_c]
# Para el triángulo rectángulo específico (con el ángulo recto en b):Si el triángulo está alineado con los ejes (como en la figura), por ejemplo, b=(xb, yb), a=(xb, ya), c=(xc, yb), muchos de los coeficientes bi o ci se simplifican a 0, y la matriz K^e resultante será más sencilla.
# Ejemplo de una matriz con coordenadas:
# x1=(0,0); x2=(1,0); x3=(0,1)
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# El cálculo anterior ya representa la generalización para un elemento triangular lineal con cualquier tamaño, orientación, y ubicación de los nodos.
# Esta generalización son las Coordenadas de Área (o Coordenadas Baricéntricas) y la Formulación Isoparamétrica
# 1. Coordenadas de Área / Funciones de Forma (Ni)En la formulación de Elementos Finitos para el problema de Poisson/Laplace, la variable u(x, y) se interpola dentro de un elemento e usando las funciones de forma (Ni) y los valores nodales (ui):
u(u, y) == u^e*x.y == sum(N_i(x, y)*u_i, i)
# Para los elementos triangulares lineales, las funciones de forma Ni son polinómicas de primer orden y se relacionan directamente con las coordenadas de área (λi):
# donde P es un punto genérico (x, y) dentro del triángulo.
N_a(x, y) == λ_a(x, y) == Area(Pbc)/Area(abc)
# 2. Formulación Isoparamétrica (para elementos de orden superior)Para elementos más complejos o cuando se utiliza una transformación a un elemento de referencia (un triángulo unitario canónico), se utiliza la Formulación Isoparamétrica.
# Este método utiliza un Jacobiano (J) para mapear la integral de la matriz de rigidez de las coordenadas cartesianas (x, y) a las coordenadas naturales (ξ, η) del elemento de referencia.
K^e == integral(integral(B^T*DB*det(J), ξ = -1 .. 1), η = -1 .. 1)
# Ejemplo para el primer triangulo con coordenadas:
# x1=(0,0); x2=(2,0.5); x3=(0.5,1.5)
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# La Forma Débil es una reformulación de una Ecuación Diferencial Parcial (EDP) que se obtiene multiplicando la EDP por una función de ponderación o función de prueba (v) y luego integrando sobre todo el dominio (Ω)
# Conceptos Clave: Reducción de la Continuidad (Diferenciabilidad):
# La solución original o "fuerte" (u) de la ecuación de Poisson (como Δu = f) debe ser dos veces diferenciable (u E C^2(Ω)) para que sus derivadas de segundo orden existan puntualmente.
# Al aplicar la integración por partes (o el Teorema de la Divergencia), se traslada una de las derivadas de la solución u a la función de prueba v. Esto reduce la exigencia de diferenciabilidad sobre u. La solución u ahora solo necesita ser una vez diferenciable (u E H^1(Ω) ), lo que es más fácil de satisfacer por funciones de aproximación polinómicas (como las usadas en MEF).
# Método de Galerkin / Residuos Ponderados: La idea central es que el error o residuo (R = Δu- f) debe ser ortogonal a un espacio de funciones de prueba. Es decir, el residuo promedio ponderado debe ser cero en todo el dominio:
integral(integral(R*v, A)) == 0  # para toda función de prueba v
# bases del MEF: Esta formulación transforma el problema de EDP en un problema de minimización o variación, que, al ser discretizado, se reduce a un sistema de ecuaciones algebraicas lineales (A * u = b).
# El problema original que se busca resolver es la Ecuación de Poisson en 2D:
[Δu == d^2*u/dx^2 + d^2*u/dy^2 == f(x, y); u == 0; du/dn == 0]  # Condicion de Dirichlet
# Condicion de Neumann
# Paso 1: Planteamiento de Residuos Ponderados Se reescribe la ecuación diferencial de forma que el residuo sea cero y se multiplica por la función de prueba v:
integral(integral((d^2*u/dx^2 + d^2*u/dy^2 - f)*v, A), A) == 0
# Paso 2: Aplicación del Teorema de la Divergencia (Integración por Partes)
# Aplicamos la identidad de integración por partes en 2D (que es una aplicación del Teorema de Green o Teorema de la Divergencia):
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# Sustituyendo esto en la ecuación del Paso 1, y reordenando, obtenemos la Forma Débil:
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# Paso 3: Aplicación de las condiciones de borde
# El termino de contorno, integarl cerrada(v*(du/dn)dS), se divide sobre los contornos r_d (Dirichlet) y r_n (Neumann).
# - Condicion de Dirichlet (u=0 en r_d):
# En el método de Galerkin, la funcion de prueba v debe pertenecer al mismo espacio de funciones que u y debe sastifacer las condiciones de borde homogeneas de Dirichlet.
# Como u=0 en r_d, se exige que v=0 en r_d.
# Esto anula la integral de contorno sobre r_d.
# - Condicion de Neumann (du/dn)=0 en r_n.:
# la condición de Neumann es una condición de borde natural en esta formulación.
# Como (du/dn)=0 en r_n, esto anula la integral de contorno sobre r_n.
# Dado que ambas integrales de contorno se anulan, la forma debil final simplicada es:
integral(integral(fv, A)) == integral(integral(du/dx*dv/dx + du/dy*dv/dy, A))
# El problema ahora es que para encontrar u talque para toda fucion de prueba v sastifaga las condiciones de Dirichlet homogeneas, se cumpla:
B(u, v) == L(v)
# Donde: la forma Bilineal
B(u, v) - MatrizdeRigidez(A)
B(u, v) == integral(integral(grad(□, u*grad(□, v)), A))
# Funcion Lineal L(v):
L(v) == integral(integral(fv, A))  # Esta es la forma canonica que se discretiza en el MEF para generar el sistema
A*u == b
# Forma Nodal:
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# Se plantea con la forma debil un sistema de ecuaciones
A*u == b
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# Resolucion del sistema
# Grafico tridimensional de la solucion
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# Error absoluto en cada nodo, error absoluto maximo y promedio con su grafico tridimensional:
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# ========= ERRORES FEM P1 (Malla manual) =========
# Error absoluto máximo = 0.00041195
# Error absoluto promedio = 0.00005461
# =================================================
# Una vez creada las mallas en GMSH se resolvieron los mallados, ahora vamos a mostrar los graficos con sus calculo de error absoluto máximo y promedio de cada uno.
# === MALLA OBJETIVO 49 NODOS ===
#
# Nodos reales = 31
# Error máximo  = 0.00047005
# Error promedio = 0.00016022
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# === MALLA OBJETIVO 81 NODOS ===
#
# Nodos reales = 31
# Error máximo  = 0.00047005
# Error promedio = 0.00016022
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# === MALLA OBJETIVO 121 NODOS ===
#
# Nodos reales = 39
# Error máximo  = 0.00044548
# Error promedio = 0.00016144
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# === MALLA OBJETIVO 441 NODOS ===
#
# Nodos reales = 84
# Error máximo  = 0.00010609
# Error promedio = 0.00005030
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# === MALLA OBJETIVO 961 NODOS ===
#
# Nodos reales = 164
# Error máximo  = 0.00004783
# Error promedio = 0.00001863
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# === MALLA OBJETIVO 1681 NODOS ===
#
# Nodos reales = 266
# Error máximo  = 0.00003513
# Error promedio = 0.00000975
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# === MALLA OBJETIVO 2601 NODOS ===
#
# Nodos reales = 366
# Error máximo  = 0.00001898
# Error promedio = 0.00000796
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# Los picos en los errores se deben al metodo utilizado, como son figuras planas triangulares se generan estos picos muy diferentes a la suavidad del grafico que tiene el error en FDM
# Grafica 2D de la relación de Error absoluto máximo con la cantidad de nodos.
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# Grafico 2D de la relación de Error absoluto promedio con la cantidad de nodos.
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# Bibliografía
# Chapra-Canale: Metodos Numericos para ingenieros, 5a Edicion VL.
# Jhonson - Numerical Solutions
